<?xml version="1.0"?>
<Node name="root" gravity="0 0 0" dt="0.01" bbox="-200 -200 -200 200 200 200">
    <RequiredPlugin name="SofaOpenglVisual"/>
    <RequiredPlugin name="SofaHapticAvatar"/>
    <RequiredPlugin name='SofaHaptics' />
    <RequiredPlugin name='SofaSparseSolver'/>
	<VisualStyle displayFlags="showVisualModels showBehaviorModels hideCollisionModels" />

    <DefaultPipeline name="pipeline" depth="6" verbose="0"/>
    <BruteForceDetection name="detection" />
    <DefaultContactManager name="response" response="FrictionContact" />
    <LocalMinDistance name="proximity" alarmDistance="0.15" contactDistance="0.05" angleCone="0.0" />
    <FreeMotionAnimationLoop/>
    <LCPConstraintSolver tolerance="0.001" maxIt="1000"/>


    <HapticAvatarPortalManager name="portalMgr" configFilename="./config/PortalSetup.xml" printLog="1" />
    <HapticAvatarEmulator name="HADevice" portName="//./COM3" printLog="1" portalManager="@portalMgr"
    drawDeviceAxis="1" scale="0.5" dumpThreadInfo="1" floorHeight="1.0" testMode="2"/>

    <MeshObjLoader name="ProtalMesh" filename="mesh/Portal.obj" handleSeams="1"/>
    <Node name="Portal_1">
        <MechanicalObject name="ms" template="Rigid3d" position="@portalMgr.portalPosition1"/>
        <Node name="VisuPortal">
            <OglModel name="Visual" src="@../../ProtalMesh" />
            <RigidMapping input="@.." output="@Visual" index="0"/>
        </Node>
    </Node>

    <Node name="Portal_2">
        <MechanicalObject name="ms" template="Rigid3d" position="@portalMgr.portalPosition2"/>
        <Node name="VisuPortal">
            <OglModel name="Visual" src="@../../ProtalMesh" />
            <RigidMapping input="@.." output="@Visual" index="0"/>
        </Node>
    </Node>

    <Node name="Portal_3">
        <MechanicalObject name="ms" template="Rigid3d" position="@portalMgr.portalPosition3"/>
        <Node name="VisuPortal">
            <OglModel name="Visual" src="@../../ProtalMesh" />
            <RigidMapping input="@.." output="@Visual" index="0"/>
        </Node>
    </Node>

    <Node name="Portal_4">
        <MechanicalObject name="ms" template="Rigid3d" position="@portalMgr.portalPosition4"/>
        <Node name="VisuPortal">
            <OglModel name="Visual" src="@../../ProtalMesh" />
            <RigidMapping input="@.." output="@Visual" index="0"/>
        </Node>
    </Node>

    <Node name="Portal_5">
        <MechanicalObject name="ms" template="Rigid3d" position="@portalMgr.portalPosition5"/>
        <Node name="VisuPortal">
            <OglModel name="Visual" src="@../../ProtalMesh" />
            <RigidMapping input="@.." output="@Visual" index="0"/>
        </Node>
    </Node>


    <Node name="tool">
        <MechanicalObject template="Rigid3d" name="DOFs" position="@../HADevice.positionDevice"/>

        <Node name="Instrument" >
            <EulerImplicitSolver name="cg_odesolver"  />
            <SparseLUSolver name="linear solver" iterations="25" tolerance="1e-09" threshold="1e-09" />

            <MechanicalObject name="instrumentState" template="Rigid3d" />
            <UniformMass name="mass" totalMass="50" />

            <LCPForceFeedback activate="true" forceCoef="0.00005"/>
            <RestShapeSpringsForceField stiffness='1000000000000' angularStiffness='1000000000000' external_rest_shape='@../DOFs' points='0' external_points='0' />
            <UncoupledConstraintCorrection/>

            <Node name="CollisionModel" tags="toolCollision">
                <MeshObjLoader filename="./mesh/Grasper.obj"  name="loader"/>
                <MeshTopology src="@loader" name="InstrumentCollisionModel" />
                <MechanicalObject src="@loader" name="instrumentCollisionState"  ry="0" rz="0" dz="0" tags="toolPosition"/>
                <SphereCollisionModel name="instrumentPoint" radius="0.2" contactStiffness="10" tags="CarvingTool" />
                <LineCollisionModel />
                <RigidMapping name="MM->CM mapping" input="@instrumentState" output="@instrumentCollisionState" />
            </Node>

            <Node name="VisualModel" >
                <MeshObjLoader name="meshLoader_1" filename="./mesh/Grasper.obj" handleSeams="1" />
                <OglModel name="InstrumentVisualModel" src="@meshLoader_1"/>
                <RigidMapping name="MM->VM mapping" input="@instrumentState" output="@InstrumentVisualModel" />
            </Node>
        </Node>
    </Node>


</Node>
