<?xml version="1.0"?>
<Node name="root" gravity="0 0 0" dt="0.01" bbox="-200 -200 -200 200 200 200">
    <RequiredPlugin name="SofaOpenglVisual"/>
    <RequiredPlugin name="SofaHapticAvatar"/>
    <RequiredPlugin name='SofaHaptics' />
    <RequiredPlugin name='SofaSparseSolver'/>
	<VisualStyle displayFlags="showVisualModels showBehaviorModels showCollisionModels" />

    <DefaultPipeline name="pipeline" depth="6" verbose="0"/>
    <BruteForceDetection name="detection" />
    <DefaultContactManager name="response" response="FrictionContact" />
    <LocalMinDistance name="proximity" alarmDistance="0.15" contactDistance="0.05" angleCone="0.0" />
    <FreeMotionAnimationLoop/>
    <LCPConstraintSolver tolerance="0.001" maxIt="1000"/>


    <HapticAvatarPortalManager name="portalMgr" configFilename="./config/PortalSetup.xml" printLog="1" />
    <HapticAvatarDeviceController name="HADevice" portName="//./COM3" printLog="1" portalManager="@portalMgr"
    drawDeviceAxis="1" drawDebugForce="1" iboxController="@HAIBox" dumpThreadInfo="1"/>
    <HapticAvatarIBoxController name="HAIBox" portName="//./COM5" printLog="1" />

    <MeshObjLoader name="ProtalMesh" filename="mesh/Portal.obj" handleSeams="1"/>
    <Node name="Portal_1">
        <MechanicalObject name="ms" template="Rigid3d" position="@portalMgr.portalPosition1"/>
        <Node name="VisuPortal">
            <OglModel name="Visual" src="@../../ProtalMesh" />
            <RigidMapping input="@.." output="@Visual" index="0"/>
        </Node>
    </Node>

    <Node name="Portal_2">
        <MechanicalObject name="ms" template="Rigid3d" position="@portalMgr.portalPosition2"/>
        <Node name="VisuPortal">
            <OglModel name="Visual" src="@../../ProtalMesh" />
            <RigidMapping input="@.." output="@Visual" index="0"/>
        </Node>
    </Node>

    <Node name="Portal_3">
        <MechanicalObject name="ms" template="Rigid3d" position="@portalMgr.portalPosition3"/>
        <Node name="VisuPortal">
            <OglModel name="Visual" src="@../../ProtalMesh" />
            <RigidMapping input="@.." output="@Visual" index="0"/>
        </Node>
    </Node>

    <Node name="Portal_4">
        <MechanicalObject name="ms" template="Rigid3d" position="@portalMgr.portalPosition4"/>
        <Node name="VisuPortal">
            <OglModel name="Visual" src="@../../ProtalMesh" />
            <RigidMapping input="@.." output="@Visual" index="0"/>
        </Node>
    </Node>

    <Node name="Portal_5">
        <MechanicalObject name="ms" template="Rigid3d" position="@portalMgr.portalPosition5"/>
        <Node name="VisuPortal">
            <OglModel name="Visual" src="@../../ProtalMesh" />
            <RigidMapping input="@.." output="@Visual" index="0"/>
        </Node>
    </Node>


    <Node name="Instrument" >
        <MechanicalObject name="GrasperDOFs" template="Rigid3d" position="@../HADevice.testPosition"/>
    </Node>


    <Node name="Grasper" >
        <EulerImplicitSolver name="cg_odesolver"  />
        <SparseLUSolver name="linear solver" tolerance="1e-09" />

        <MechanicalObject name="instrumentState" template="Rigid3d" position="@../HADevice.testPosition"/>
        <UniformMass name="mass" totalMass="1.0" />

        <LCPForceFeedback activate="true" forceCoef="0.000001" localHapticConstraintAllFrames="1"/>
        <RestShapeSpringsForceField points="0 1 2 3 4 5"
        stiffness='1000000000000'
        angularStiffness='1000000000000'
        external_rest_shape='@../Instrument/GrasperDOFs'  />
        <UncoupledConstraintCorrection/>

        <Node name="Shaft_collision" tags="toolCollision">
            <MeshObjLoader filename="./mesh/grasper_shaft_collision.obj"  name="loader"/>
            <MeshTopology src="@loader" name="InstrumentCollisionModel" />
            <MechanicalObject src="@loader" name="instrumentCollisionState"  ry="0" rz="0" dz="0" tags="toolPosition"/>
            <SphereCollisionModel name="instrumentPoint" radius="0.2" group="0" />
            <LineCollisionModel group="0"/>
            <RigidMapping name="MM->CM mapping" input="@.." output="@instrumentCollisionState" index="1"/>
        </Node>

<!--
        <Node name="Shaft_visu" >
            <MeshObjLoader name="meshLoader_1" filename="./mesh/grasper_shaft.obj" handleSeams="1" />
            <OglModel name="InstrumentVisualModel" src="@meshLoader_1"/>
            <RigidMapping name="MM->VM mapping" input="@.." output="@InstrumentVisualModel" index="1"/>
        </Node>
-->

        <Node name="JawUp_collision" tags="toolCollision">
            <MeshObjLoader filename="./mesh/grasper_jaws_up_collision.obj"  name="loader"/>
            <MeshTopology src="@loader" name="InstrumentCollisionModel" />
            <MechanicalObject src="@loader" name="instrumentCollisionState"  ry="0" rz="0" dz="0" tags="toolPosition"/>
            <SphereCollisionModel name="instrumentPoint" radius="0.2" group="0" />
            <LineCollisionModel group="0"/>
            <RigidMapping name="MM->CM mapping" input="@.." output="@instrumentCollisionState" index="2"/>
        </Node>

<!--        <Node name="JawUp_visu" >
            <MeshObjLoader name="meshLoader_1" filename="./mesh/grasper_jaws_up.obj" handleSeams="1" />
            <OglModel name="InstrumentVisualModel" src="@meshLoader_1"/>
            <RigidMapping name="MM->VM mapping" input="@.." output="@InstrumentVisualModel" index="2"/>
        </Node>
        -->


        <Node name="JawDown_collision" tags="toolCollision">
            <MeshObjLoader filename="./mesh/grasper_jaws_down_collision.obj"  name="loader"/>
            <MeshTopology src="@loader" name="InstrumentCollisionModel" />
            <MechanicalObject src="@loader" name="instrumentCollisionState"  ry="0" rz="0" dz="0" tags="toolPosition"/>
            <SphereCollisionModel name="instrumentPoint" radius="0.2" group="0" />
            <LineCollisionModel group="0"/>
            <RigidMapping name="MM->CM mapping" input="@.." output="@instrumentCollisionState" index="4"/>
        </Node>
<!--
        <Node name="JawDown_visu" >
            <MeshObjLoader name="meshLoader_1" filename="./mesh/grasper_jaws_down.obj" handleSeams="1" />
            <OglModel name="InstrumentVisualModel" src="@meshLoader_1"/>
            <RigidMapping name="MM->VM mapping" input="@.." output="@InstrumentVisualModel" index="4"/>
        </Node>
        -->
    </Node>


    <RegularGridTopology name="grid_1" n="6 2 6" min="-100 -10 -100" max="100 10 100" />
    <Node name="Cube">
        <MechanicalObject src="@../grid_1" name="Volume" />

        <TetrahedronSetTopologyContainer name="Tetra_topo" />
        <TetrahedronSetTopologyModifier name="Modifier" />
        <TetrahedronSetTopologyAlgorithms name="TopoAlgo" template="Vec3d" />
        <TetrahedronSetGeometryAlgorithms name="GeomAlgo" template="Vec3d" drawEdges="0" drawScaleTetrahedra="0.8"/>

        <Hexa2TetraTopologicalMapping name="default28" input="@../grid_1" output="@Tetra_topo" />

        <Node name="Surface">
            <TriangleSetTopologyContainer  name="Container"  fileTopology="" tags=" " />
            <TriangleSetTopologyModifier   name="Modifier" />
            <TriangleSetTopologyAlgorithms name="TopoAlgo"   template="Vec3d" />
            <TriangleSetGeometryAlgorithms name="GeomAlgo"   template="Vec3d" drawTriangles="0"/>
            <Tetra2TriangleTopologicalMapping input="@../Tetra_topo" output="@Container" />

            <TriangleCollisionModel simulated="0" moving="0" bothSide="false" group="1"/>
            <LineCollisionModel simulated="0" moving="0" group="1" />
            <PointCollisionModel simulated="0" moving="0" group="1"/>

            <Node name="VisuSurface">
                <OglModel name="Visual" color="1.000 1.000 1.000 1.0" />
                <BarycentricMapping input="@.." output="@Visual" />
            </Node>
        </Node>
    </Node>

</Node>
